Vn := 10
V := Vn
MinV := 10
MaxV := 50
a := 0.5
P := 0
Pz := 100
FindPh(Pk, V, dt) := Pk + V*dt
FindV(V, dt) :=
    V ← V + a*dt if V < MaxV
    V ← MaxV otherwise
    V
dt := 1
i := 0 .. 99
Vm[0] := MinV
Pm[0] := P
Vm[i + 1] := FindV(Vm[i], dt)
Pm[i + 1] := FindPh(Pm[i], Vm[i], dt)
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