Vmin := 1
Vmax := 10
a := 0.2
Pg := 100
Ps := 1
Pbr := 0.52*|Pg - Ps|
dt := 0.01*|Pg - Ps|
NewV(V, dt, Pg, Pk, Pbr, a, Vmax) :=
    Pbr ← V*(1 + V/a)
    if V > 0
        V ← V - a*dt if |Pg - Pk| < Pbr
        otherwise
            V ← V + a*dt if V < Vmax
            V ← Vmax otherwise
    V ← 0 otherwise
    V
NewPh(dt, V, Ph) := Ph + V*dt
FindV(Vmin, Vmax, Pg, Ps, Pbr, a, dt) :=
    V[0] ← Vmin
    Ph[0] ← Ps
    for i ∈ 1 .. 99
        V[i] ← NewV(V[i - 1], dt, Pg, Ph[i - 1], Pbr, a, Vmax)
        Ph[i] ← NewPh(dt, V[i - 1], Ph[i - 1])
    V
FindP(V, Ps, dt) :=
    P[0] ← Ps
    for i ∈ 1 .. 99
        P[i] ← NewPh(dt, V[i - 1], P[i - 1])
    P
Vmin := 0.1
Vmax := 2
a := 0.1
Pg := 100
Ps := 50
Pbr := Vmax*(1 + Vmax/a) = 42
dt := 0.01*|Pg - Ps|
V := FindV(Vmin, Vmax, Pg, Ps, Pbr, a, dt)
P := FindP(V, Ps, dt)
i := 0 .. 90
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P = [
    50; 50.05; 50.125; 50.225; 50.35; 50.5; 50.675; 50.875; 51.1; 51.35
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]
