T1(Vmax, a, Vcur, Smax) := (2*Vmax - Vcur)/a + ((2*Smax*a - 4*Vmax^2) + Vcur^2)/(2*a*Vmax)
Vmax := 56
a := 23
t := Vmax/a = 2.43478
Smax := Vmax^2/(2*a) = 68.1739
Smax := 69 .. 429
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GetAngel(Ang) :=
    A ← Ang - 360 if Ang > 360
    otherwise
        A ← 360 + Ang if Ang < 0
        A ← Ang otherwise
    A
GetMinPath(GivP, KurP, D) :=
    P ← GivP - KurP if D == 1
    P ← 360 - (GivP - KurP) otherwise
    P ← GetAngel(P)
    P
GetNewPcur(Pcur, Sst) :=
    P ← Pcur + Sst
    P ← P - 360 if P > 360
    P
GetStopStartPath(GivP, KurP, Sst) :=
    K ← GetNewPcur(KurP, Sst)
    S1 ← GetMinPath(GivP, K, 1)
    S2 ← GetMinPath(GivP, K, 0)
    S ← S2 + Sst if S1 > S2
    S ← S1 + Sst otherwise
    S
T2(Vmax, a, KurP) := Vmax/a + 2*sqrt(GetStopStartPath(0, KurP, Vmax^2/(2*a)))/a
KurP := 0, 1 .. 360
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